/PREP7

ET,1,PLANE182

KEYOPT,1,1,0
KEYOPT,1,3,1
KEYOPT,1,6,0

!*
!*
MPTEMP,,,,,,,,
MPTEMP,1,0
MPDATA,EX,1,,2e5
MPDATA,PRXY,1,,0.3
MPTEMP,,,,,,,,
MPTEMP,1,0
MPDATA,DENS,1,,7800e-9

!LOCAL,11,1,10,0,0, , , ,1,1,
!==================================================перечитать задачу==============================
/PREP7
LSCLEAR,ALL
ACLEAR,1
ADELE, ALL
LDELE,All
KDELE,All
CSYS,0
!дано
h=0.5 !толщина

R2=5 !наружный радиус сечерия тора

r1=R2-h !внутренний радиус сечерия тора

!Rt=4
Rt=2

b=Rt*R2 !радиус окружности тора

pr=21 !давление внутреннее
po=20 !давление внешнее

elemcount=480 !число разбиений сетки

Pi=ACOS(-1)  !число пи

tn = 1000 !техническое число

elemsize=0.05 !размер разбиения

! начало решения

K,10,b,0,0

CIRCLE, 10, R2, , , 180, 0
CIRCLE, 10, r1, , , 180, 0

LSTR, 1, 4
LSTR, 3, 6


AL,ALL
AESIZE,1,elemsize
AMESH,1

LOCAL,112,1,b,0,0, , , ,1,1,
NROTAT,ALL
LSCLEAR,ALL

SFL,3,PRES,pr,
SFL,4,PRES,pr,
SFL,1,PRES,po,
SFL,2,PRES,po,


DL,5,1, UY, ,
DL,6,1, UY, ,

CSYS,0
CSYS,112

! *GET, nummax, NODE, 0, NUM, MAX, ,
! *DIM, resset, array, nummax, 4
! *DIM, stressset, array, nummax, 1


pathpoints = 180
*DIM, resset, array, pathpoints+1, 4
*DIM, resset1, array, pathpoints+1, 4


FINISH
/SOL
!/STATUS,SOLU
SOLVE
/Post1
RSYS,112


pathpoints = 180
PATH,p4,2,30, pathpoints,

CSWPLA,113
!*
WPOFF,10,0
CSWPLA,114,1
CSCIR,114,1
PPATH,1,0,b+r1,0,0
PPATH,2,0,b-r1,0,0
PMAP,'UNI '
/PBC,PATH,1
/REPLOT
WPCSYS,1,113
CSWPLA,113

CSYS,112
*DO, p,1,pathpoints+1

    PDEF,SR1,S,Y,AVG
    *GET, resset(p, 1), PATH, , ITEM, SR1, PATHPT, p
    *GET, resset(p, 2), PATH, , ITEM, S, PATHPT, p
    resset(p, 3)=resset(p, 2)/(r1)
    resset(p, 4)=resset(p, 3)*180/(Pi)
*ENDDO

    *VSCFUN, lstrmx, LMAX, resset(1,4)
    inerang_max=resset(lstrmx,1)

    ! *VSCFUN, lstrmn, LMIN, resset(1,1)
    ! inerang_min=resset(lstrmn,4)


PATH,pp3,2,30,pathpoints,
CSWPLA,115
!*
WPOFF,10,0
CSWPLA,116,1
CSCIR,116,1
PPATH,1,0,b+R2,0,0
PPATH,2,0,b-R2,0,0
PMAP,'UNI '
/PBC,PATH,1
/REPLOT
WPCSYS,1,115
CSWPLA,115

!PRANGE, Pi*2*R/(60), 0, Pi*2*R

CSYS,112
*DO, p,1,pathpoints+1

    PDEF,SR2,S,Y,AVG
    *GET, resset1(p, 1), PATH, , ITEM, SR2, PATHPT, p
    *GET, resset1(p, 2), PATH, , ITEM, S, PATHPT, p
    resset1(p, 3)=resset1(p, 2)/(R2)
    resset1(p, 4)=resset1(p, 3)*180/(Pi)
*ENDDO

    *VSCFUN, lstrmx1, LMAX, resset1(1,4)
    outerang_max=resset1(lstrmx1,1)

    ! *VSCFUN, lstrmn1, LMIN, resset1(1,1)
    ! outerang_min=resset1(lstrmn1,4)


! PDEF,SR2,S,Y,AVG
! /PBC,PATH, ,0
! !PRPATH, SR2


!===============================================файлы===============================================

/DELETE, D:\forlit, txt
/DELETE, D:\resset, txt
/DELETE, D:\newresset, txt
/DELETE, D:\newresset90, txt
!*CREATE,ansuitmp18
! *CFOPEN, 'D:\forlit', txt,,append
! *VWRITE,Rt,b,h,maxstress_r ,maxstress_R1,pr,po , , , ,, , ,
! (7f10.4)
! *CFCLOS
! *END

! *CREATE,ansuitmp19
! *CFOPEN, 'D:\resset', txt,,append
! *VWRITE,b,h,strmx,ccmx,ccmy,strmn,ccminx,ccminy, , , , ,, , ,
! (8f10.4)
! *CFCLOS
! *END

*CREATE,ansuitmp20
*CFOPEN, 'D:\newresset', txt,,append
*VWRITE, b, h, i_ang_180, i_s_180, o_ang_180, o_s_180
(6f10.4)
*CFCLOS
*END

*CREATE,ansuitmp21
*CFOPEN, 'D:\newresset90', txt,,append
*VWRITE, b, h, i_ang_90, i_s_90, o_ang_90, o_s_90
(6f10.4)
*CFCLOS
*END


!================================цикл===============================================
!================================цикл===============================================
!*DO, h, 1.5,2, 0.1
h=1
!*DO, pr, 1, 10, 1
*DO, Rt, 2, 50, 1
    !*DO, h, 0.1, 1, 0.025
        FINISH
        /SOL
        !/STATUS,SOLU

        b=Rt*R2 !радиус окружности тора
        r1=R2-h
        SOLVE
        /POST1
        RSYS,112


        /PREP7
        LSCLEAR,ALL
        ACLEAR,1
        ADELE, ALL
        LDELE,All
        KDELE,All
        CSYS,0

        K,10,b,0,0

        CIRCLE, 10, R2, , , 180, 0
        CIRCLE, 10, r1, , , 180, 0

        LSTR, 1, 4
        LSTR, 3, 6


        AL,ALL
        AESIZE,1,elemsize
        AMESH,1

        LOCAL,112,1,b,0,0, , , ,1,1,
        NROTAT,ALL
        LSCLEAR,ALL

        SFL,3,PRES,pr,
        SFL,4,PRES,pr,
        SFL,1,PRES,po,
        SFL,2,PRES,po,


        DL,5,1, UY, ,
        DL,6,1, UY, ,

        CSYS,0
        CSYS,112

        ! *GET, nummax, NODE, 0, NUM, MAX, ,
        ! *DIM, resset, array, nummax, 4
        ! *DIM, stressset, array, nummax, 1


        pathpoints = 180
        *DIM, resset, array, pathpoints+1, 4
        *DIM, resset1, array, pathpoints+1, 4


        FINISH
        /SOL
        !/STATUS,SOLU
        SOLVE
        /Post1
        RSYS,112


        pathpoints = 180
        PATH,p4,2,30, pathpoints,

        CSWPLA,113
        !*
        WPOFF,b,0
        CSWPLA,114,1
        CSCIR,114,1
        PPATH,1,0,b+r1,0,0
        PPATH,2,0,b-r1,0,0
        PMAP,'UNI '
        /PBC,PATH,1
        /REPLOT
        WPCSYS,1,113
        CSWPLA,113

        CSYS,112
        *DO, p,1,pathpoints+1

            PDEF,SR1,S,Y,AVG
            *GET, resset(p, 1), PATH, , ITEM, SR1, PATHPT, p
            *GET, resset(p, 2), PATH, , ITEM, S, PATHPT, p
            resset(p, 3)=resset(p, 2)/(r1)
            resset(p, 4)=resset(p, 3)*180/(Pi)
        *ENDDO


            *VSCFUN, i_ang_180, MAX, resset(1,4)
            *VSCFUN, i_l_ang_180, LMAX, resset(1,4)
            i_s_180=resset(i_l_ang_180,1)

            i_ang_90=resset(1,4)
            i_s_90=resset(1,1)

            ! *VSCFUN, instressmx, MAX, resset(1,4)
            ! *VSCFUN, lstrmx, LMAX, resset(1,1)
            ! inerangmax=resset(lstrmx,4)


            ! *VSCFUN, instressmn, MIN, resset(1,1)
            ! *VSCFUN, lstrmn, LMIN, resset(1,1)
            ! inerangmin=resset(lstrmn,4)


        PATH,pp3,2,30,pathpoints,
        CSWPLA,115
        !*
        WPOFF,b,0
        CSWPLA,116,1
        CSCIR,116,1
        PPATH,1,0,b+R2,0,0
        PPATH,2,0,b-R2,0,0
        PMAP,'UNI '
        /PBC,PATH,1
        /REPLOT
        WPCSYS,1,115
        CSWPLA,115

        !PRANGE, Pi*2*R/(60), 0, Pi*2*R

        CSYS,112
        *DO, p,1,pathpoints+1

            PDEF,SR2,S,Y,AVG
            *GET, resset1(p, 1), PATH, , ITEM, SR2, PATHPT, p
            *GET, resset1(p, 2), PATH, , ITEM, S, PATHPT, p
            resset1(p, 3)=resset1(p, 2)/(R2)
            resset1(p, 4)=resset1(p, 3)*180/(Pi)
        *ENDDO
        ! *MWRITE, resset1, outer, txt, --, IJK,
        !  %10.4F %10.4F %10.4F %10.4F


            *VSCFUN, o_ang_180, MAX, resset1(1,4)
            *VSCFUN, o_l_ang_180, LMAX, resset1(1,4)
            o_s_180=resset1(o_l_ang_180,1)

            o_ang_90=resset1(1,4)
            o_s_90=resset1(1,1)

            ! *VSCFUN, outstressmax,MAX, resset1(1,1)
            ! *VSCFUN, lstrmx1, LMAX, resset1(1,1)
            ! outerangmax = resset1(lstrmx1,4)

            *USE, ansuitmp21
            ! *VSCFUN, outstressmin,MIN, resset1(1,1)
            ! *VSCFUN, lstrmn1, LMIN, resset1(1,1)
            ! outerangmin = resset1(lstrmn1,4)
            *USE, ansuitmp20
            *DEL,resset
            *DEL,resset1
        ! K,10,b,0,0

        ! CIRCLE, 10, R2, , , 180, 0
        ! CIRCLE, 10, r1, , , 180, 0

        ! LSTR, 1, 4
        ! LSTR, 3,6


        ! AL,ALL
        ! AESIZE,1,elemsize
        ! AMESH,1

        ! LOCAL,112,1,b,0,0, , , ,1,1,
        ! NROTAT,ALL
        ! LSCLEAR,ALL

        ! SFL,3,PRES,pr,
        ! SFL,4,PRES,pr,

        ! DL,5,1, UY, ,
        ! DL,6,1, UY, ,

        ! CSYS,0
        ! CSYS,112


        ! *GET, nummax, NODE, 0, NUM, MAX, ,
        ! *DIM, resset, array, nummax, 4
        ! *DIM, stressset, array, nummax, 1


        ! FINISH
        ! /SOL
        ! SOLVE
        ! /POST1
        ! RSYS,112


        ! *DO, i, 1, nummax, 1
        !     *GET, maxstress_r, NODE, i, S,Y
        !     stressset(i,1,1)=maxstress_r
        ! *ENDDO

        ! *VSCFUN, strmx, MAX, stressset(1,1)
        ! *VSCFUN, strmn, MIN, stressset(1,1)
        ! *VSCFUN, locms, LMAX, stressset(1,1)
        ! *VSCFUN, locmins, LMIN, stressset(1,1)
        ! *GET, ccmx, NODE, locms, LOC, X
        ! *GET, ccmy, NODE, locms, LOC, Y
        ! *GET, ccminx, NODE, locmins, LOC, X
        ! *GET, ccminy, NODE, locmins, LOC, Y
        ! *USE, ansuitmp19
        ! *DEL,resset
        ! *DEL,stressset
    !*ENDDO
*ENDDO
