/PREP7

ET,1,PLANE182

KEYOPT,1,1,0
KEYOPT,1,3,1
KEYOPT,1,6,0

!*
!*
MPTEMP,,,,,,,,
MPTEMP,1,0
MPDATA,EX,1,,2e5
MPDATA,PRXY,1,,0.3
MPTEMP,,,,,,,,
MPTEMP,1,0
MPDATA,DENS,1,,7.8e-6

!LOCAL,11,1,10,0,0, , , ,1,1,
!==================================================перечитать задачу==============================
/PREP7
LSCLEAR,ALL
ACLEAR,1
ADELE, ALL
LDELE,All
KDELE,All
CSYS,0

!==================дано==================


R2=50 !наружный радиус сечерия тора

h=R2/10 !толщина
!h=1.9802
r1=R2-h !внутренний радиус сечерия тора

rav=(R2+r1)/2 !срединный радиус счения тора

b=5*R2 !радиус окружности тора

smax=450 !SMAX для случая с b=2 R1 равно 350, для случая с b-20 R1 равно 408
iniload=0.25 !коэффициент начального нагружения (в долях процента, для процента надо домножить на 100)


pr=(2*h*smax*iniload)/rav*(b-rav)/(2*b-rav)  !давление
po=1e-10

elemcount=180 !число разбиений сетки

Pi=ACOS(-1)  !число пи

tn = 1000 !техническое число

kk=1


!ai=0.05
ai=0
mi=0
!mi=ai/(kk*smax)
ao=0
ao=0.05
!mo=0
mo=ao/(kk*smax)

timesize=0.1 !шаг по времени в задаче

linesize=40    !число разбиений на плоскостях симметрии
meshsize=1    !размер элементов сетки

!==================дано==================


!==================массивы для задачи==================

*DIM, lowcXcyl, array, elemcount+1, 3
*DIM, lowcxstress, array, elemcount+1, 3
*DIM, highcXcyl, array, elemcount+1, 3
*DIM, highcxstress, array, elemcount+1, 3
*DIM, lowcxcorrosion, array, elemcount+1, 3
*DIM, highcxcorrosion, array, elemcount+1, 3
*DIM, thickness, array, elemcount+1, 3
*DIM, testset, array, elemcount+1,4


!==================массивы для задачи==================


*DO, i, 0, elemcount,1
    lowcXcyl(i+1,1,1) = Pi/elemcount*i
    lowcXcyl(i+1,2,1) = b+(R2-h)*COS(Pi/elemcount*i)
    lowcXcyl(i+1,3,1) = (R2-h)*SIN( Pi/elemcount*i)
    K,i+1, lowcXcyl(i+1,2,1), lowcXcyl(i+1,3,1), 0,
*ENDDO

*DO, i, 1, elemcount,1
    LSTR, i, i+1
*ENDDO


*DO, i, 0, elemcount,1
    highcXcyl(i+1,1,1) = Pi/elemcount*i
    highcXcyl(i+1,2,1) = b+R2*COS(Pi/elemcount*i)
    highcXcyl(i+1,3,1) = R2*SIN( Pi/elemcount*i)
K,i+1+tn,highcXcyl(i+1,2,1),highcXcyl(i+1,3,1),0,
*ENDDO

*DO, i, 0, elemcount, 1
    thickness(i+1,1,1) = Pi/elemcount*i
    thickness(i+1,2,1) = thickness(i+1,1,1)/Pi*180
    thickness(i+1,3,1) = ((highcXcyl(i+1,2,1)-lowcXcyl(i+1,2,1))**2 + (highcXcyl(i+1,3,1)-lowcXcyl(i+1,3,1))**2)**0.5
*ENDDO

*DO, i, 1, elemcount,1
    LSTR, i+tn, i+1+tn
*ENDDO


LSTR, 1, 1+tn
LSTR, elemcount+1, elemcount+1+tn

*DO, i, 1, elemcount
LESIZE,i, , ,1, , , , ,1
*ENDDO
*DO, i, elemcount+1, 2*elemcount
LESIZE,i, , ,1, , , , ,1
*ENDDO

!LESIZE,ALL, , ,1, , , , ,1
!LESIZE,elemcount*2+1, , ,linesize, , , , ,1
!LESIZE,elemcount*2+2, , ,linesize, , , , ,1

AL,ALL
AMAP,1,1,elemcount+1,1001,elemcount+1000+1
!AESIZE, 1, meshsize,
!AMESH,1


LOCAL,112,1,b,0,0, , , ,1,1,
NROTAT,ALL
LSCLEAR,ALL

*DO, i, 1, elemcount,1
    SFL,i,PRES,pr,
*ENDDO

*DO, i, elemcount+1, elemcount+elemcount,1
    SFL,i,PRES,po,
*ENDDO

DL,elemcount*2+1,1, UY, ,
DL,elemcount*2+2,1, UY, ,


CSYS,0
CSYS,112

FINISH
/SOL
!/STATUS,SOLU
SOLVE
/Post1
!
!
!
RSYS,112
KSEL, S, KP,,1,elemcount+1
NSLK,S
*GET, nodelow, NODE,0, COUNT
Selnode=0

*Do,i,1,nodelow
    NodeNo=NDNEXT(SelNode) !NDNEXT(N) Next selected node having a node number greater than N.
    testset(i,1,1)= NodeNo
    *GET,testset(i,2,1),NODE,testset(i,1,1),S,Y
    SelNode=NodeNo
*Enddo

KSEL,ALL

KSEL, S, KP,,tn+1,tn+elemcount+1
NSLK,S
*GET, nodehigh, NODE,0, COUNT
Selnode=0

*Do,i,1,nodehigh
    NodeNo=NDNEXT(SelNode) !NDNEXT(N) Next selected node having a node number greater than N.
    testset(i,3,1)= NodeNo
    *GET,testset(i,4,1),NODE,testset(i,3,1),S,Y
    SelNode=NodeNo
*Enddo

!NSEL,S, NODE, ,1,elemcount+1
!/output,comp1_output,txt ! redirect output to a file called "comp1_output.txt"
!PRNSOL,,S,Y
!
!
!===============================================файлы====================================

/DELETE, D:\stressatnodes, txt
/DELETE, D:\thickdepStress, txt
/DELETE, D:\doubleside, txt

*CREATE,ansuitmp12
*MWRITE,lowcxcorrosion, D:\solidthicarray1231231, txt,, JIK, 3,
(3F10.4)
*CFCLOS
*END

*CREATE,ansuitmp09
*MWRITE,highcxcorrosion, D:\high123123, txt,, JIK, 3,
(3F10.4)
*CFCLOS
*END

*CREATE,ansuitmp13
*CFOPEN, 'D:\thickdepThick', txt,,append
*VWRITE,DEPminthicX,DEPminthicY,,, , ,, ,,, , , , ,, , , ,
(2f10.4)
*CFCLOS
*END

*CREATE,ansuitmp14
*CFOPEN, 'D:\thickdepStress', txt,,append
*VWRITE,t1,DEPmaxstress,Coordofmax,DEPminthick,Coordofminthick , DEPmaxthick,, ,,, , , , ,, , , ,
(6f10.4)
*CFCLOS
*END

*CREATE,ansuitmp15
*CFOPEN, 'D:\doubleside', txt,,append
*VWRITE,t1,DEPminthick,DEPmaxstress,Coordofmax,DEPmaxstressouter, Coordofmaxouter,kk,halfof,iniload,mi, , , ,, , , ,
(10f10.4)
*CFCLOS
*END

!================================цикл===============================================
*DO, iniload, 0.25,0.5, 0.25

   pr=(2*h*smax*iniload)/rav*(b-rav)/(2*b-rav)  !давление

    *DO, kk, 4, 4, 3

       ai=0.05
        !ai=0
        !mi=0
       mi=ai/(kk*smax)

        !ao=0.05
        ao=0
        mo=0
        !mo=ao/(kk*smax)
        !==================================================перечитать задачу==============================
        /PREP7
        LSCLEAR,ALL
        ACLEAR,1
        ADELE, ALL
        LDELE,All
        KDELE,All
        CSYS,0

        *DO, i, 0, elemcount,1
            lowcXcyl(i+1,1,1) = Pi/elemcount*i
            lowcXcyl(i+1,2,1) = b+(R2-h)*COS(Pi/elemcount*i)
            lowcXcyl(i+1,3,1) = (R2-h)*SIN( Pi/elemcount*i)
            K,i+1, lowcXcyl(i+1,2,1), lowcXcyl(i+1,3,1), 0,
        *ENDDO

        *DO, i, 1, elemcount,1
            LSTR, i, i+1
        *ENDDO


        *DO, i, 0, elemcount,1
            highcXcyl(i+1,1,1) = Pi/elemcount*i
            highcXcyl(i+1,2,1) = b+R2*COS(Pi/elemcount*i)
            highcXcyl(i+1,3,1) = R2*SIN( Pi/elemcount*i)
        K,i+1+tn,highcXcyl(i+1,2,1),highcXcyl(i+1,3,1),0,
        *ENDDO

        *DO, i, 0, elemcount, 1
            thickness(i+1,1,1) = Pi/elemcount*i
            thickness(i+1,2,1) = thickness(i+1,1,1)/Pi*180
            thickness(i+1,3,1) = ((highcXcyl(i+1,2,1)-lowcXcyl(i+1,2,1))**2 + (highcXcyl(i+1,3,1)-lowcXcyl(i+1,3,1))**2)**0.5
        *ENDDO

        *DO, i, 1, elemcount,1
            LSTR, i+tn, i+1+tn
        *ENDDO

        LSTR, 1, 1+tn
        LSTR, elemcount+1, elemcount+1+tn

        *DO, i, 1, elemcount
            LESIZE,i, , ,1, , , , ,1
        *ENDDO
        *DO, i, elemcount+1, 2*elemcount
            LESIZE,i, , ,1, , , , ,1
        *ENDDO

        !LESIZE,ALL, , ,1, , , , ,1
        !LESIZE,elemcount*2+1, , ,linesize, , , , ,1
        !LESIZE,elemcount*2+2, , ,linesize, , , , ,1

        AL,ALL
        AMAP,1,1,elemcount+1,1001,elemcount+1000+1
        !AESIZE, 1, meshsize,
        !AMESH,1


        LOCAL,112,1,b,0,0, , , ,1,1,
        NROTAT,ALL
        LSCLEAR,ALL

        *DO, i, 1, elemcount,1
            SFL,i,PRES,pr,
        *ENDDO

        *DO, i, elemcount+1, elemcount+elemcount,1
            SFL,i,PRES,po,
        *ENDDO

        DL,elemcount*2+1,1, UY, ,
        DL,elemcount*2+2,1, UY, ,


        CSYS,0
        CSYS,112

        FINISH
        /SOL
        !/STATUS,SOLU
        SOLVE
        /Post1
        !RSYS,112

        h2=h*0.1 !определение критической толщины


        !==================================================заходим во временной цикл==============================
        *DO, t1, 0, 150, timesize


            !определяем напряжения в узлах на поверхности
            !t1=0.07
            /POST1
            RSYS,112
            CSYS,112


            ! *GET, nodecount, NODE, 0, COUNT
            ! *DIM, nodecoords, array, nodecount, 3
            ! *DIM, newcoords, array, nodecount, 3

            !     *DO, i, 1, nodecount,1
            !         *GET, nodecoords(i,1,1), NODE, i, LOC, X
            !         *GET, nodecoords(i,2,1), NODE, i, LOC, Y
            !     *ENDDO


            !     *DO, i, 1, nodecount,1
            !         *IF, nodecoords(i,1,1), EQ, R2-h,THEN
            !             newcoords(i,1,1)=nodecoords(i,1,1)
            !             newcoords(i,2,1)=nodecoords(i,2,1)
            !         *ELSE
            !             newcoords(i,1,1)=0
            !             newcoords(i,2,1)=0
            !         *ENDIF
            !     *ENDDO


            KSEL, S, KP,,1,elemcount+1
            NSLK,S
            *GET, nodelow, NODE,0, COUNT
            Selnode=0

            *Do,i,1,nodelow
                NodeNo=NDNEXT(SelNode) !NDNEXT(N) Next selected node having a node number greater than N.
                testset(i,1,1)= NodeNo
                *GET,testset(i,2,1),NODE,testset(i,1,1),S,Y
                SelNode=NodeNo
            *Enddo

            KSEL,ALL

            KSEL, S, KP,,tn+1,tn+elemcount+1
            NSLK,S
            *GET, nodehigh, NODE,0, COUNT
            Selnode=0

            *Do,i,1,nodehigh
                NodeNo=NDNEXT(SelNode) !NDNEXT(N) Next selected node having a node number greater than N.
                testset(i,3,1)= NodeNo
                *GET,testset(i,4,1),NODE,testset(i,3,1),S,Y
                SelNode=NodeNo
            *Enddo

            *DO, i, 0, elemcount,1
                lowcxstress(i+1,1,1) = testset(i+1,2,1)
                lowcxstress(i+1,2,1) = Pi/elemcount*i
                *IF, lowcxstress(i+1,1,1), LT, 0, THEN
                    lowcxstress(i+1,3,1)=-lowcxstress(i+1,1,1)
                    *ELSE
                    lowcxstress(i+1,3,1)=lowcxstress(i+1,1,1)
                *ENDIF
            *ENDDO

            !================================первое напряжение============================
            !================================первое напряжение============================
            !================================первое напряжение============================


            *IF, t1, EQ, timesize, THEN

                *VSCFUN, initialstress, MAX, lowcxstress(1,1)

                *ELSE

                    *IF, t1, EQ, 0, THEN
                        RSYS,112
                        CSYS,112
                        /Post1
                        /EFACET,1
                        PLNSOL, S, Y, 2, 5.0

                        !SCREENSHOT
                        !*
                        !*
                        /RGB,INDEX,100,100,100, 0
                        /RGB,INDEX, 80, 80, 80,13
                        /RGB,INDEX, 60, 60, 60,14
                        /RGB,INDEX, 0, 0, 0,15
                        /SHOW,PNG,,0
                        PNGR,COMP,1,-1
                        PNGR,ORIENT,HORIZ
                        PNGR,COLOR,2
                        PNGR,TMOD,1
                        /GFILE,1600,
                        !*
                        !*
                        /REPLOT
                        /SHOW,CLOSE
                        /DEVICE,VECTOR,0
                        !*
                        !*
                        !END OF SCREENSHOT
                    *ENDIF

                    *DO, W, 1, 50, 0.2
                        *IF, t1, EQ, W, THEN
                            RSYS,112
                            CSYS,112
                            /Post1
                            /EFACET,1
                            PLNSOL, S, Y, 0, 5.0

                            !SCREENSHOT
                            !*
                            !*
                            /RGB,INDEX,100,100,100, 0
                            /RGB,INDEX, 80, 80, 80,13
                            /RGB,INDEX, 60, 60, 60,14
                            /RGB,INDEX, 0, 0, 0,15
                            /SHOW,PNG,,0
                            PNGR,COMP,1,-1
                            PNGR,ORIENT,HORIZ
                            PNGR,COLOR,2
                            PNGR,TMOD,1
                            /GFILE,1600,
                            !*
                            !*
                            /REPLOT
                            /SHOW,CLOSE
                            /DEVICE,VECTOR,0
                            !*
                            !*
                            !END OF SCREENSHOT
                        *ENDIF
                    *ENDDO


                *DO, i, 0, elemcount,1
                    highcxstress(i+1,1,1) = testset(i+1,4,1)
                    highcxstress(i+1,2,1) = Pi/elemcount*i

                    *IF, highcxstress(i+1,1,1), LT, 0, THEN
                        highcxstress(i+1,3,1)=-highcxstress(i+1,1,1)
                        *ELSE
                        highcxstress(i+1,3,1)=highcxstress(i+1,1,1)
                    *ENDIF
                *ENDDO

                !вычисляем новую геометрию по коррозии
                *DO, i, 0, elemcount, 1
                    lowcxcorrosion(i+1,1,1) = Pi/elemcount*i
                    lowcxcorrosion(i+1,2,1) = b+((R2-h)+(ai+(lowcxstress(i+1,3,1))*mi)*t1)*COS(Pi/elemcount*i)
                    lowcxcorrosion(i+1,3,1) = ((R2-h)+(ai+(lowcxstress(i+1,3,1))*mi)*t1)*SIN(Pi/elemcount*i)
                *ENDDO


                *DO, i, 0, elemcount, 1
                    highcxcorrosion(i+1,1,1) = Pi/elemcount*i
                    highcxcorrosion(i+1,2,1) = b+(R2-(ao+(highcxstress(i+1,3,1))*mo)*t1)*COS(Pi/elemcount*i)
                    highcxcorrosion(i+1,3,1) = (R2-(ao+(highcxstress(i+1,3,1))*mo)*t1)*SIN(Pi/elemcount*i)
                *ENDDO


                *DO, i, 0, elemcount, 1
                    thickness(i+1,1,1) = Pi/elemcount*i
                    thickness(i+1,2,1) = thickness(i+1,1,1)/Pi*180
                    thickness(i+1,3,1) = ((highcxcorrosion(i+1,2,1)-lowcxcorrosion(i+1,2,1))**2 + (highcxcorrosion(i+1,3,1)-lowcxcorrosion(i+1,3,1))**2)**0.5
                *ENDDO

                !удаляем старое и перестраиваем
                /PREP7
                LSCLEAR,ALL
                ACLEAR,1
                ADELE, ALL
                LDELE,All
                KDELE,All
                CSYS,0

                *DO, i, 0, elemcount,1
                    K,i+1,lowcxcorrosion(i+1,2,1),lowcxcorrosion(i+1,3,1),0,
                *ENDDO

                *DO, i, 1, elemcount,1
                    LSTR, i, i+1
                *ENDDO

                *DO, i, 0, elemcount,1
                    K,i+tn+1,highcxcorrosion(i+1,2,1),highcxcorrosion(i+1,3,1),0,
                *ENDDO

                *DO, i, 1, elemcount,1
                    LSTR, i+tn, i+1+tn
                *ENDDO

                *DO, i, 1, elemcount,1
                    LSTR, i+tn, i+1+tn
                *ENDDO


                LSTR, 1, 1+tn
                LSTR, elemcount+1, elemcount+1+tn

                *DO, i, 1, elemcount
                    LESIZE,i, , ,1, , , , ,1
                *ENDDO
                *DO, i, elemcount+1, 2*elemcount
                    LESIZE,i, , ,1, , , , ,1
                *ENDDO

                !LESIZE,ALL, , ,1, , , , ,1
                !LESIZE,elemcount*2+1, , ,linesize, , , , ,1
                !LESIZE,elemcount*2+2, , ,linesize, , , , ,1

                AL,ALL
                AMAP,1,1,elemcount+1,1001,elemcount+1000+1
                !AESIZE, 1, meshsize,
                !AMESH,1
                !граничные условия в цилиндрической системе

                LOCAL,112,1,b,0,0, , , ,1,1,
                NROTAT,ALL
                LSCLEAR,ALL

                *DO, i, 1, elemcount,1
                    SFL,i,PRES,pr,
                *ENDDO

                *DO, i, elemcount+1, elemcount+elemcount,1
                    SFL,i,PRES,po,
                *ENDDO

                DL,elemcount*2+1,1, UY, ,
                DL,elemcount*2+2,1, UY, ,


                CSYS,0
                CSYS,112
                RSYS,112
                !переходим в обычную СК и решаем

                CSYS,0
                FINISH
                /SOL
                SOLVE

                !результаты (время, максимальное напряжение в узле, координата узла, минимальная толщина в узле)

                !массивы для расчета напряжений
                *VSCFUN, DEPmaxstress, MAX, lowcxstress(1,3)
                *VSCFUN, DEPmaxstressouter, MAX, highcxstress(1,3)

                !max напряжения на внутренней поверхности
                *VSCFUN, locstress, LMAX, lowcxstress(1,3)
                Coordofmax = lowcxstress(locstress,2)*180/Pi

                !max напряжения на внешней поверхности
                *VSCFUN, locstressouter, LMAX, highcxstress(1,3)
                Coordofmaxouter = highcxstress(locstressouter,2)*180/Pi

                !расчет толщины
                *VSCFUN, DEPminthick, MIN, thickness(1,3)
                *VSCFUN, locminthick, LMIN, thickness(1,3)
                Coordofminthick = thickness(locminthick,2)
                *VSCFUN, DEPmaxthick, MAX, thickness(1,3)
                halfof=(DEPmaxstress-initialstress)/(smax-initialstress)

                *use, ansuitmp14
                *use, ansuitmp15
                *use, ansuitmp12
                *use, ansuitmp09


                *ENDIF
            !*IF, DEPminthick,LT,h2,OR,DEPmaxstress,GT,smax,EXIT
            *IF, DEPmaxstress,GT,smax,EXIT
            *ENDIF


        *ENDDO
        EPLOT
        /REPLOT

    *ENDDO

*ENDDO

NSLK,S

*Get,tem,NODE,,S,Y
